AnyForceMomentMeasure ForceMomentMeasure_Auto =
{
  AnyMuscle& ref0_0 = .Contact0.Push.RefMuscles.ref0;
  AnyMuscle& ref0_1 = .Contact0.Push.RefMuscles.ref1;
  AnyMuscle& ref0_2 = .Contact0.Push.RefMuscles.ref2;
  AnyMuscle& ref0_3 = .Contact0.Push.RefMuscles.ref3;
  AnyMuscle& ref0_4 = .Contact0.Push.RefMuscles.ref4;

  AnyMuscle& ref1_0 = .Contact1.Push.RefMuscles.ref0;
  AnyMuscle& ref1_1 = .Contact1.Push.RefMuscles.ref1;
  AnyMuscle& ref1_2 = .Contact1.Push.RefMuscles.ref2;
  AnyMuscle& ref1_3 = .Contact1.Push.RefMuscles.ref3;
  AnyMuscle& ref1_4 = .Contact1.Push.RefMuscles.ref4;

  AnyMuscle& ref2_0 = .Contact2.Push.RefMuscles.ref0;
  AnyMuscle& ref2_1 = .Contact2.Push.RefMuscles.ref1;
  AnyMuscle& ref2_2 = .Contact2.Push.RefMuscles.ref2;
  AnyMuscle& ref2_3 = .Contact2.Push.RefMuscles.ref3;
  AnyMuscle& ref2_4 = .Contact2.Push.RefMuscles.ref4;

  AnyMuscle& ref3_0 = .Contact3.Push.RefMuscles.ref0;
  AnyMuscle& ref3_1 = .Contact3.Push.RefMuscles.ref1;
  AnyMuscle& ref3_2 = .Contact3.Push.RefMuscles.ref2;
  AnyMuscle& ref3_3 = .Contact3.Push.RefMuscles.ref3;
  AnyMuscle& ref3_4 = .Contact3.Push.RefMuscles.ref4;

  AnyMuscle& ref4_0 = .Contact4.Push.RefMuscles.ref0;
  AnyMuscle& ref4_1 = .Contact4.Push.RefMuscles.ref1;
  AnyMuscle& ref4_2 = .Contact4.Push.RefMuscles.ref2;
  AnyMuscle& ref4_3 = .Contact4.Push.RefMuscles.ref3;
  AnyMuscle& ref4_4 = .Contact4.Push.RefMuscles.ref4;

  AnyMuscle& ref5_0 = .Contact5.Push.RefMuscles.ref0;
  AnyMuscle& ref5_1 = .Contact5.Push.RefMuscles.ref1;
  AnyMuscle& ref5_2 = .Contact5.Push.RefMuscles.ref2;
  AnyMuscle& ref5_3 = .Contact5.Push.RefMuscles.ref3;
  AnyMuscle& ref5_4 = .Contact5.Push.RefMuscles.ref4;

  AnyMuscle& ref6_0 = .Contact6.Push.RefMuscles.ref0;
  AnyMuscle& ref6_1 = .Contact6.Push.RefMuscles.ref1;
  AnyMuscle& ref6_2 = .Contact6.Push.RefMuscles.ref2;
  AnyMuscle& ref6_3 = .Contact6.Push.RefMuscles.ref3;
  AnyMuscle& ref6_4 = .Contact6.Push.RefMuscles.ref4;

  AnyMuscle& ref7_0 = .Contact7.Push.RefMuscles.ref0;
  AnyMuscle& ref7_1 = .Contact7.Push.RefMuscles.ref1;
  AnyMuscle& ref7_2 = .Contact7.Push.RefMuscles.ref2;
  AnyMuscle& ref7_3 = .Contact7.Push.RefMuscles.ref3;
  AnyMuscle& ref7_4 = .Contact7.Push.RefMuscles.ref4;

  AnyMuscle& ref8_0 = .Contact8.Push.RefMuscles.ref0;
  AnyMuscle& ref8_1 = .Contact8.Push.RefMuscles.ref1;
  AnyMuscle& ref8_2 = .Contact8.Push.RefMuscles.ref2;
  AnyMuscle& ref8_3 = .Contact8.Push.RefMuscles.ref3;
  AnyMuscle& ref8_4 = .Contact8.Push.RefMuscles.ref4;

  AnyMuscle& ref9_0 = .Contact9.Push.RefMuscles.ref0;
  AnyMuscle& ref9_1 = .Contact9.Push.RefMuscles.ref1;
  AnyMuscle& ref9_2 = .Contact9.Push.RefMuscles.ref2;
  AnyMuscle& ref9_3 = .Contact9.Push.RefMuscles.ref3;
  AnyMuscle& ref9_4 = .Contact9.Push.RefMuscles.ref4;

  AnyMuscle& ref10_0 = .Contact10.Push.RefMuscles.ref0;
  AnyMuscle& ref10_1 = .Contact10.Push.RefMuscles.ref1;
  AnyMuscle& ref10_2 = .Contact10.Push.RefMuscles.ref2;
  AnyMuscle& ref10_3 = .Contact10.Push.RefMuscles.ref3;
  AnyMuscle& ref10_4 = .Contact10.Push.RefMuscles.ref4;

  AnyMuscle& ref11_0 = .Contact11.Push.RefMuscles.ref0;
  AnyMuscle& ref11_1 = .Contact11.Push.RefMuscles.ref1;
  AnyMuscle& ref11_2 = .Contact11.Push.RefMuscles.ref2;
  AnyMuscle& ref11_3 = .Contact11.Push.RefMuscles.ref3;
  AnyMuscle& ref11_4 = .Contact11.Push.RefMuscles.ref4;

  AnyMuscle& ref12_0 = .Contact12.Push.RefMuscles.ref0;
  AnyMuscle& ref12_1 = .Contact12.Push.RefMuscles.ref1;
  AnyMuscle& ref12_2 = .Contact12.Push.RefMuscles.ref2;
  AnyMuscle& ref12_3 = .Contact12.Push.RefMuscles.ref3;
  AnyMuscle& ref12_4 = .Contact12.Push.RefMuscles.ref4;

  AnyMuscle& ref13_0 = .Contact13.Push.RefMuscles.ref0;
  AnyMuscle& ref13_1 = .Contact13.Push.RefMuscles.ref1;
  AnyMuscle& ref13_2 = .Contact13.Push.RefMuscles.ref2;
  AnyMuscle& ref13_3 = .Contact13.Push.RefMuscles.ref3;
  AnyMuscle& ref13_4 = .Contact13.Push.RefMuscles.ref4;

  AnyMuscle& ref14_0 = .Contact14.Push.RefMuscles.ref0;
  AnyMuscle& ref14_1 = .Contact14.Push.RefMuscles.ref1;
  AnyMuscle& ref14_2 = .Contact14.Push.RefMuscles.ref2;
  AnyMuscle& ref14_3 = .Contact14.Push.RefMuscles.ref3;
  AnyMuscle& ref14_4 = .Contact14.Push.RefMuscles.ref4;

  AnyMuscle& ref15_0 = .Contact15.Push.RefMuscles.ref0;
  AnyMuscle& ref15_1 = .Contact15.Push.RefMuscles.ref1;
  AnyMuscle& ref15_2 = .Contact15.Push.RefMuscles.ref2;
  AnyMuscle& ref15_3 = .Contact15.Push.RefMuscles.ref3;
  AnyMuscle& ref15_4 = .Contact15.Push.RefMuscles.ref4;

  AnyMuscle& ref16_0 = .Contact16.Push.RefMuscles.ref0;
  AnyMuscle& ref16_1 = .Contact16.Push.RefMuscles.ref1;
  AnyMuscle& ref16_2 = .Contact16.Push.RefMuscles.ref2;
  AnyMuscle& ref16_3 = .Contact16.Push.RefMuscles.ref3;
  AnyMuscle& ref16_4 = .Contact16.Push.RefMuscles.ref4;

  AnyMuscle& ref17_0 = .Contact17.Push.RefMuscles.ref0;
  AnyMuscle& ref17_1 = .Contact17.Push.RefMuscles.ref1;
  AnyMuscle& ref17_2 = .Contact17.Push.RefMuscles.ref2;
  AnyMuscle& ref17_3 = .Contact17.Push.RefMuscles.ref3;
  AnyMuscle& ref17_4 = .Contact17.Push.RefMuscles.ref4;

  AnyMuscle& ref18_0 = .Contact18.Push.RefMuscles.ref0;
  AnyMuscle& ref18_1 = .Contact18.Push.RefMuscles.ref1;
  AnyMuscle& ref18_2 = .Contact18.Push.RefMuscles.ref2;
  AnyMuscle& ref18_3 = .Contact18.Push.RefMuscles.ref3;
  AnyMuscle& ref18_4 = .Contact18.Push.RefMuscles.ref4;

  AnyMuscle& ref19_0 = .Contact19.Push.RefMuscles.ref0;
  AnyMuscle& ref19_1 = .Contact19.Push.RefMuscles.ref1;
  AnyMuscle& ref19_2 = .Contact19.Push.RefMuscles.ref2;
  AnyMuscle& ref19_3 = .Contact19.Push.RefMuscles.ref3;
  AnyMuscle& ref19_4 = .Contact19.Push.RefMuscles.ref4;

  AnyMuscle& ref20_0 = .Contact20.Push.RefMuscles.ref0;
  AnyMuscle& ref20_1 = .Contact20.Push.RefMuscles.ref1;
  AnyMuscle& ref20_2 = .Contact20.Push.RefMuscles.ref2;
  AnyMuscle& ref20_3 = .Contact20.Push.RefMuscles.ref3;
  AnyMuscle& ref20_4 = .Contact20.Push.RefMuscles.ref4;

  AnyMuscle& ref21_0 = .Contact21.Push.RefMuscles.ref0;
  AnyMuscle& ref21_1 = .Contact21.Push.RefMuscles.ref1;
  AnyMuscle& ref21_2 = .Contact21.Push.RefMuscles.ref2;
  AnyMuscle& ref21_3 = .Contact21.Push.RefMuscles.ref3;
  AnyMuscle& ref21_4 = .Contact21.Push.RefMuscles.ref4;

  AnyMuscle& ref22_0 = .Contact22.Push.RefMuscles.ref0;
  AnyMuscle& ref22_1 = .Contact22.Push.RefMuscles.ref1;
  AnyMuscle& ref22_2 = .Contact22.Push.RefMuscles.ref2;
  AnyMuscle& ref22_3 = .Contact22.Push.RefMuscles.ref3;
  AnyMuscle& ref22_4 = .Contact22.Push.RefMuscles.ref4;

  AnyMuscle& ref23_0 = .Contact23.Push.RefMuscles.ref0;
  AnyMuscle& ref23_1 = .Contact23.Push.RefMuscles.ref1;
  AnyMuscle& ref23_2 = .Contact23.Push.RefMuscles.ref2;
  AnyMuscle& ref23_3 = .Contact23.Push.RefMuscles.ref3;
  AnyMuscle& ref23_4 = .Contact23.Push.RefMuscles.ref4;

  AnyMuscle& ref24_0 = .Contact24.Push.RefMuscles.ref0;
  AnyMuscle& ref24_1 = .Contact24.Push.RefMuscles.ref1;
  AnyMuscle& ref24_2 = .Contact24.Push.RefMuscles.ref2;
  AnyMuscle& ref24_3 = .Contact24.Push.RefMuscles.ref3;
  AnyMuscle& ref24_4 = .Contact24.Push.RefMuscles.ref4;

  AnyMuscle& ref25_0 = .Contact25.Push.RefMuscles.ref0;
  AnyMuscle& ref25_1 = .Contact25.Push.RefMuscles.ref1;
  AnyMuscle& ref25_2 = .Contact25.Push.RefMuscles.ref2;
  AnyMuscle& ref25_3 = .Contact25.Push.RefMuscles.ref3;
  AnyMuscle& ref25_4 = .Contact25.Push.RefMuscles.ref4;

  AnyRefFrame& base = BaseObjectPara ;

  AnyVec3 Flocal = F * base.Axes;
  AnyVec3 Mlocal = M * base.Axes;

  AnyVar Fx_On_Plate = Flocal[0];
  AnyVar Fy_On_Plate = Flocal[1];
  AnyVar Fz_On_Plate = Flocal[2];
  AnyVar Mx_On_Plate = Mlocal[0];
  AnyVar My_On_Plate = Mlocal[1];
  AnyVar Mz_On_Plate = Mlocal[2];

  AnyVar Fx_On_Human = -Fx_On_Plate;
  AnyVar Fy_On_Human = -Fy_On_Plate;
  AnyVar Fz_On_Human = -Fz_On_Plate;
  AnyVar Mx_On_Human = -Mx_On_Plate;
  AnyVar My_On_Human = -My_On_Plate;
  AnyVar Mz_On_Human = -Mz_On_Plate;
};
