#ifndef MOCAP_C3D_DATA_PATH
#path MOCAP_C3D_DATA_PATH "<ANYBODY_PATH_MAINFILEDIR>"
#endif

#ifndef MOCAP_OUTPUT_FILENAME_PREFIX
 #define MOCAP_OUTPUT_FILENAME_PREFIX ""
#endif

#ifndef BODY_MODEL_CONFIG_FILE
#path BODY_MODEL_CONFIG_FILE  "ExampleFiles/BodyModelConfig_FullBody.any"
#endif


#ifndef MOCAP_EXTRA_DRIVERS_FILE
#path MOCAP_EXTRA_DRIVERS_FILE "ExampleFiles/ExtraDrivers_PlugInGait.any"
#endif

#ifndef MOCAP_MARKER_PROTOCOL_FILE
#path MOCAP_MARKER_PROTOCOL_FILE "ExampleFiles/MarkerProtocol_PlugInGait.any"
// HACK workaround add a dummy designvar when the model is loaded with out
// markers
Main.Studies.ParameterIdentification = {AnyDesVar dummy = {Val = 0;};};
#endif

#ifndef MOCAP_EXTRA_DRIVERS_FILE
#path MOCAP_EXTRA_DRIVERS_FILE "ExampleFiles/ExtraDrivers_PlugInGait.any"
#endif

#ifndef MOCAP_FORCE_PLATE_FILE
#path MOCAP_FORCE_PLATE_FILE "ExampleFiles/ForcePlates_Type2.any"
#endif

// This set a example c3d file, if the AnyMocapModel is loaded as main.
#if ANYBODY_FILENAME_MAINFILE == "AnyMocapModel.any"
Main.ModelSetup.TrialSpecificData.TrialFileName = "C3D_ExampleFile";
#endif

#ifndef MOCAP_C3DSETTINGS
#path  MOCAP_C3DSETTINGS  "C3DSettings.any"
#endif


#ifndef MOCAP_RESIDUALS
#define MOCAP_RESIDUALS "ReacForce"
#endif
