//This file creates the environment around the human
AnyFolder EnvironmentModel = {

  AnyFixedRefFrame GlobalRef ={
    AnyVec3 r = Origin;
    Origin={0,0,0};
    AnyDrawRefFrame drw={ScaleXYZ=0.2*{1,1,1};};
  };
  AnyFolder ForcePlates = {
     #include "<MOCAP_FORCE_PLATE_FILE>"
  };
};
